# PCA: Метод главных компонент
# Пример 1: моделирование Монте-Карло
# Рассмотрим n := 3 признаков в задаче ML. Каждое их сочетание задает выборочное значение вектора в пространстве R_3.x=(x0,x1,x2)=(x,y,z). Будем считать, что признаки коррелированы, а именно: z(x, y) := 0 + 2*x - 5*y  .
#
# Сгенерируем псевдослучайную выборку объема N := 30 , причем пусть x,y будут независимыми, а z = z(x,y) + шум, интенсивность которого возьмем равной σ := 10.
#
# Т.е. наша выборка = это N = 30псевдослучайных векторов в пространстве R_3_(,)
# _(которые можно объединить в матрицу) _Nxn_(:)
i := 0 .. N - 1
x[i, 0] := 10*rnd(1) - 5
x[i, 1] := 1*x[i, 0] + 4*rnd(1) - 2
x[i, n - 1] := 1*z(x[i, 0], x[i, 1]) + σ*(rnd(1) - .5)
j := 0 .. n - 1
m[j] := mean(x[:, j]) = [-0.188081; -0.285544; 1.43474]
x[:, 0] = [-0.592396; -0.167866; -3.01555; 3.41051; -1.64085; 4.62636; -4.16027; 3.36049; 0.353368; -4.01712; 1.39181; -2.66291; -2.63827; -3.58456; -0.838881; 1.03729; 4.79006; 1.84373; -2.19111; 0.924193; -2.54459; -4.62034; 3.23799; 1.1438; 1.81033; -2.63145; -1.05398; -3.31153; 4.42198; 1.67733]
x[i, j] := x[i, j] - m[j]  # disabled
k := slope(x[:, 1], x[:, 2]) = -3.03046
b := intercept(x[:, 1], x[:, 2]) = 0.569415
k := (sum(x[:, 1]*sum(x[:, 2])) - N*sum(x[:, 1][i]*x[:, 2][i], i = 0 .. N - 1))/(sum(x[:, 1])^2 - N*sum(x[:, 1][i]^2, i = 0 .. N - 1)) = -3.03046
b := (sum(x[:, 2]) - k*sum(x[:, 1]))/N = 0.569415
x = [
    -0.592396, 0.167196, -5.0125;
    -0.167866, -1.39445, 7.56056;
    -3.01555, -4.0201, 13.6076;
    3.41051, 2.49113, -7.7164;
    -1.64085, -2.18677, 3.23;
    4.62636, 3.35351, -11.7026;
    -4.16027, -5.68645, 19.8891;
    3.36049, 3.85678, -8.63684;
    0.353368, -0.896454, 8.43961;
    -4.01712, -4.56921, 12.2237;
    1.39181, 2.41921, -10.8046;
    -2.66291, -1.51811, 6.41429;
    -2.63827, -1.49572, 6.22067;
    -3.58456, -3.53982, 8.8332;
    -0.838881, -0.294058, -1.49284;
    1.03729, 0.21682, 4.33955;
    4.79006, 5.20778, -14.7131;
    1.84373, 0.0940421, 5.60751;
    -2.19111, -2.66473, 6.74561;
    0.924193, 0.184236, -0.50602;
    -2.54459, -0.625866, 1.3676;
    -4.62034, -3.80889, 13.1823;
    3.23799, 1.83807, 1.17669;
    1.1438, -0.663134, 1.33149;
    1.81033, 3.12242, -13.8842;
    -2.63145, -2.25166, 5.49678;
    -1.05398, -0.517365, -1.18277;
    -3.31153, -2.23867, 7.06329;
    4.42198, 6.27407, -18.9859;
    1.67733, 0.579882, 4.95081
]
# В силу коррелированности, все точки (векторы в R_3) расположены вблизи плоскости:
# z(x,y)
# Причем, чем меньше шум s = 1 s, тем все точки ближе к плоскости (при нулевом шуме они точно лежат в плоскости):
# [3D plot: transpose([x[:, 0], x[:, 1], x[:, 2]]), z]
# [plot: x[:, 2], k*t + b vs x[:, 1], t]
# Мы хотим снизить размерность: найти признаки - комбинацию коррелированных признаков и оставить только их.
#
# Расчет 1: R_2 --> R_1
# Сначала (для наглядности) можно рассмотреть более простой случай - проекцию пространства R_3. Новый признак будет задаваться вектором v. Как его найти?
#
# 1-й вариант - вручную (построить лин.регрессию по МНК):
v := 1/sqrt(1 + k^2)*[1; k] = [0.313363; -0.949633]
K := -1
B := 1
k = -3.03046
b = 0.569415
Q(K, B) := sum((x[:, 2][i] - K*x[:, 1][i] - B)^2, i = 0 .. N - 1)
r := minimize(Q, K, B) = [-3.03046; 0.569415]
Q_d(K, B) := sum((x[:, 2][i] - K*x[:, 1][i] - B)^2/(K^2 + 1), i = 0 .. N - 1)
r_d := minimize(Q_d, K, B) = [-3.40536; 0.462364]
r_d[0] = -3.40536
V(k) := 1/sqrt(1 + k^2)*[1; k]
V2(k) := 1/sqrt(1 + k^2)*[k; -1]
V(0) = [1; 0]
V(1) = [0.707107; 0.707107]
V(k) = [0.313363; -0.949633]
V(k)[0] = 0.313363
v = [0.313363; -0.949633]
|V(1)| = 1
|V(k)| = 1
V(r_d[0]) = [0.281758; -0.959486]
# то же самое можно посчитать через напрвление максимальной дисперсии у проекции точек на приямые:
var(x[:, 1] + x[:, 2]) = 43.4265
f(k) := var(x[:, 1]*V(k)[0] + x[:, 2]*V(k)[1])
V(K)*V2(K) = 0
K := maximize(f, k) = -3.40536
V(k)*V2(k) = 0
r := -19, -18.9 .. 30
f(0) = 8.08842
V(K) = [0.281758; -0.959486]
# [plot: f(r) vs r]
V(K) = [0.281758; -0.959486]
# и ортогональный ему, "лишний" вектор
V2(K) = [-0.959486; -0.281758]
V(K)*V2(K) = 0
# 2-й вариант - через ковариационную матрицу:
cvar(x[:, 1], x[:, 2]) = -24.5116
cvar(x[:, 1], x[:, 2])/(stdev(x[:, 1])*stdev(x[:, 2])) = -0.938358
corr(x[:, 1], x[:, 2]) = -0.938358
A := [cvar(x[:, 1], x[:, 1]), cvar(x[:, 1], x[:, 2]); cvar(x[:, 1], x[:, 2]), cvar(x[:, 2], x[:, 2])] = [8.08842, -24.5116; -24.5116, 84.3613]
# Надо посчитать ее с.з. и с.в.. И как раз с.в., имеющий максимальное с.з., будет главным направлением (сравнить результат с вариантом 1):
L := eigenvals(A) = [91.5592; 0.890465]
eigenvec(A, L[0]) = [-0.281758; 0.959486]
eigenvec(A, L[1]) = [0.959486; 0.281758]
V(K) = [0.281758; -0.959486]
V2(K) = [-0.959486; -0.281758]
eigenvec(A, L[0])*V(K) = -1
V(r_d[0]) = [0.281758; -0.959486]
V2(r_d[0]) = [-0.959486; -0.281758]
# Расчет 2 - в 3D:  R_3 --> R_2
V(A, B) := 1/sqrt(1 + A^2 + B^2)*[A; B; -1]
f(A, B) := var(x[:, 0]*V(A, B)[0] + x[:, 1]*V(A, B)[1] + x[:, 2]*V(A, B)[2])
A := 1
B := 1
P := maximize(f, A, B) = [0.256963; 0.297112]
V(P[0], P[1]) = [0.239172; 0.276541; -0.930764]
[2; -5; -1]*V(P[0], P[1]) = 0.0264019
i0 := 0 .. 2
i1 := 0 .. 2
Cov[i0, i1] := cvar(x[:, i0], x[:, i1])
Cov = [7.86265, 7.37275, -20.7053; 7.37275, 8.08842, -24.5116; -20.7053, -24.5116, 84.3613]
L := eigenvals(Cov) = [96.9645; 3.11107; 0.236817]
eigenvec(Cov, L[0]) = [-0.239172; -0.276541; 0.930764]
|eigenvec(Cov, L[0])| = 1
eigenvec(Cov, L[1]) = [0.853282; 0.39759; 0.33739]
eigenvec(Cov, L[0])*eigenvec(Cov, L[1]) = 1.11022e-16
eigenvec(Cov, L[2]) = [-0.463365; 0.874898; 0.140875]
# Расчет 3 - через SVD
# Тот же самый результат (т.е. новый базис) можно получить, если использовать SVD ковариационной матрицы Cov == V*S*transpose(V). Сравните с.з. ковариационной матрицы и сингулярные числа S:
L = [96.9645; 3.11107; 0.236817]
s := svd(Cov)[0] = [96.9645; 3.11107; 0.236817]
S := diag(s) = [96.9645, 0, 0; 0, 3.11107, 0; 0, 0, 0.236817]
# и столбцы ортогональной матрицы V с с.в. ковариационной матрицы:
U := svd(Cov)[1] = [-0.239172, -0.853282, 0.463365; -0.276541, -0.39759, -0.874898; 0.930764, -0.33739, -0.140875]
eigenvec(Cov, L[0]) = [-0.239172; -0.276541; 0.930764]
eigenvec(Cov, L[1]) = [0.853282; 0.39759; 0.33739]
V := transpose(svd(Cov)[2]) = [-0.239172, -0.853282, 0.463365; -0.276541, -0.39759, -0.874898; 0.930764, -0.33739, -0.140875]
eigenvec(Cov, L[2]) = [-0.463365; 0.874898; 0.140875]
V^-1 = [-0.239172, -0.276541, 0.930764; -0.853282, -0.39759, -0.33739; 0.463365, -0.874898, -0.140875]
transpose(V) = [-0.239172, -0.276541, 0.930764; -0.853282, -0.39759, -0.33739; 0.463365, -0.874898, -0.140875]
# Таким образом, SVD-разложение ковариационной матрицы задает главные компоненты данных и его можно записать как:
V*S*transpose(V) = [7.86265, 7.37275, -20.7053; 7.37275, 8.08842, -24.5116; -20.7053, -24.5116, 84.3613]
Cov = [7.86265, 7.37275, -20.7053; 7.37275, 8.08842, -24.5116; -20.7053, -24.5116, 84.3613]
# Нормы матрицы (Фробениуса и евклидова) также можно получить через SVD:
sum(sum(Cov[i, j]^2, j = 0 .. 2), i = 0 .. 2) = 9411.84
sum(s^2) = 9411.84
norme(Cov) = 97.0147
s[0] = 96.9645
# Расчет 4 - SVD самих данных X
X == U*S*transpose(V)
s := svd(x)[0] = [54.5239; 9.72764; 2.67386]
S := diag(s) = [54.5239, 0, 0; 0, 9.72764, 0; 0, 0, 2.67386]
S0[i, j] =  # error: This variable is undefined. Check that the label is set correctly.
S[i, j] =  # error: This array index is invalid. The index must be an integer, not less than ORIGIN, and not greater than the last element.
U := svd(x)[1]
V := transpose(svd(x)[2]) = [0.236714, 0.852751, -0.465598; 0.27476, 0.400901, 0.873948; -0.931919, 0.334803, 0.139403]
sum(U[:, i]*s[i]*transpose(V[:, i]), i = 0 .. 2) = [
    -0.592396, 0.167196, -5.0125;
    -0.167866, -1.39445, 7.56056;
    -3.01555, -4.0201, 13.6076;
    3.41051, 2.49113, -7.7164;
    -1.64085, -2.18677, 3.23;
    4.62636, 3.35351, -11.7026;
    -4.16027, -5.68645, 19.8891;
    3.36049, 3.85678, -8.63684;
    0.353368, -0.896454, 8.43961;
    -4.01712, -4.56921, 12.2237;
    1.39181, 2.41921, -10.8046;
    -2.66291, -1.51811, 6.41429;
    -2.63827, -1.49572, 6.22067;
    -3.58456, -3.53982, 8.8332;
    -0.838881, -0.294058, -1.49284;
    1.03729, 0.21682, 4.33955;
    4.79006, 5.20778, -14.7131;
    1.84373, 0.0940421, 5.60751;
    -2.19111, -2.66473, 6.74561;
    0.924193, 0.184236, -0.50602;
    -2.54459, -0.625866, 1.3676;
    -4.62034, -3.80889, 13.1823;
    3.23799, 1.83807, 1.17669;
    1.1438, -0.663134, 1.33149;
    1.81033, 3.12242, -13.8842;
    -2.63145, -2.25166, 5.49678;
    -1.05398, -0.517365, -1.18277;
    -3.31153, -2.23867, 7.06329;
    4.42198, 6.27407, -18.9859;
    1.67733, 0.579882, 4.95081
]
x = [
    -0.592396, 0.167196, -5.0125;
    -0.167866, -1.39445, 7.56056;
    -3.01555, -4.0201, 13.6076;
    3.41051, 2.49113, -7.7164;
    -1.64085, -2.18677, 3.23;
    4.62636, 3.35351, -11.7026;
    -4.16027, -5.68645, 19.8891;
    3.36049, 3.85678, -8.63684;
    0.353368, -0.896454, 8.43961;
    -4.01712, -4.56921, 12.2237;
    1.39181, 2.41921, -10.8046;
    -2.66291, -1.51811, 6.41429;
    -2.63827, -1.49572, 6.22067;
    -3.58456, -3.53982, 8.8332;
    -0.838881, -0.294058, -1.49284;
    1.03729, 0.21682, 4.33955;
    4.79006, 5.20778, -14.7131;
    1.84373, 0.0940421, 5.60751;
    -2.19111, -2.66473, 6.74561;
    0.924193, 0.184236, -0.50602;
    -2.54459, -0.625866, 1.3676;
    -4.62034, -3.80889, 13.1823;
    3.23799, 1.83807, 1.17669;
    1.1438, -0.663134, 1.33149;
    1.81033, 3.12242, -13.8842;
    -2.63145, -2.25166, 5.49678;
    -1.05398, -0.517365, -1.18277;
    -3.31153, -2.23867, 7.06329;
    4.42198, 6.27407, -18.9859;
    1.67733, 0.579882, 4.95081
]
M := 1
xx := sum(U[:, i]*s[i]*transpose(V[:, i]), i = 0 .. M - 1) = [
    1.08343, 1.25756, -4.26535;
    -1.76795, -2.0521, 6.96023;
    -3.43225, -3.98389, 13.5124;
    2.05535, 2.38569, -8.0917;
    -0.946701, -1.09886, 3.72707;
    3.05892, 3.55056, -12.0427;
    -4.99046, -5.79254, 19.6469;
    2.34442, 2.72122, -9.22973;
    -1.90027, -2.20569, 7.48117;
    -3.21879, -3.73613, 12.6721;
    2.61881, 3.03971, -10.31;
    -1.66293, -1.9302, 6.54679;
    -1.61738, -1.87733, 6.36747;
    -2.37967, -2.76214, 9.36853;
    0.263187, 0.305488, -1.03614;
    -0.885072, -1.02732, 3.48444;
    3.85281, 4.47205, -15.1681;
    -1.12758, -1.30881, 4.43917;
    -1.78416, -2.07091, 7.02405;
    0.175396, 0.203586, -0.690515;
    -0.484979, -0.562927, 1.90931;
    -3.4146, -3.96341, 13.443;
    0.0414065, 0.0480615, -0.163013;
    -0.272763, -0.316602, 1.07384;
    3.36736, 3.90857, -13.257;
    -1.50648, -1.7486, 5.93085;
    0.168211, 0.195247, -0.66223;
    -1.88931, -2.19297, 7.43802;
    4.84411, 5.62267, -19.0708;
    -0.960439, -1.1148, 3.78115
]
# [3D plot: transpose([xx[:, 0], xx[:, 1], xx[:, 2]]), z]
# [3D plot: transpose([x[:, 0], x[:, 1], x[:, 2]]), z]
# [plot: x[:, 2], k*t + b, xx[:, 2] vs x[:, 1], t, xx[:, 1]]
